# Лабораторна робота #5 Виконав студент групи ІС-31 Коваль Богдан
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Num_V := 1
k := 1
α := 1
# Рівняння за варіантом:
2*x^5 - 2*x^4 - 4*x^3 + 2*x + 1
# Допрограмний етап
f(x) := 2*x^5 - 2*x^4 - 4*x^3 + 2*x + 1
f'(x) → 10*x^4 - 8*x^3 - 12*x^2 + 2
# 1 Ітерація
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# Остача від ділення f(x) на f'(x)
f2(x) := 48/25*x^3 + 12/25*x^2 - 8/5*x - 27/25
# 2 Ітерація
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# Остача від ділення f'(x) на f2(x)
f3(x) := 25/24*x^2 + 25/8*x + 125/32
# 3 Ітерація
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# Остача від ділення f2(x) на f3(x)
f4(x) := -176/25*x - 468/25
# 4 Ітерація
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# Остача від ділення f3(x) на f4(x)
f5(x) := -45875/15488
# Результат:
f(x) → 2*x^5 - 2*x^4 - 4*x^3 + 2*x + 1
f'(x) → 10*x^4 - 8*x^3 - 12*x^2 + 2
v := [1; 2; 0; -4; -2; 2]
f2(x) → 48*x^3/25 + (12*x^2/25 - (8*x/5 + 27/25))
f3(x) → 25*x^2/24 + 25*x/8 + 125/32
f4(x) → -176*x/25 - 468/25
f5(x) → -45875/15488
# Дізнаємося кількість дійсних коренів.
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# N - кількість змін знаків
N := 3
# Дізнаємося проміжки на яких знаходяться корені многочлена. Для чого продовжимо таблицю із значеннями, та почнемо обирати такі точки в яких змінюється знак многочлена на протилежний.
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# Результат:
-1 ≤ x1 ≤ 0
0 ≤ x2 ≤ 1
1 ≤ x3 ≤ 2
# Порівняння результатів у програмі MathCAD та власної програми. Підрахунок погрішності
x_mat := f(x) == 0 solve, assume, x == real → [-0.789036563465; -0.789036563465; 1.87460368997]
x_mat = [-0.789037; -0.789037; 1.8746]
x_bis := [-0.789036564529; 0.863470502198; 1.87460369617]
x_chord := [-0.789036559453; 0.863470495767; 1.87460368965]
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# Розв'язання в MathCAD 15.0
x_newt := [-0.789036563541; 0.863470497136; 1.87460369]
x_mat2 := polyroots(v) = [-0.789037; -0.474519 + 0.407821i; -0.474519 - 0.407821i; 0.86347; 1.8746]
x_mat2[3] = 0.86347
ε1 := sqrt(1/3*(x_bis[0] - x_mat2[0])^2 + 1/3*(x_bis[1] - x_mat2[3])^2 + 1/3*((x_bis[2] - x_mat2[4])^2))
ε1 = 4.65978e-9
ε2 := sqrt(1/3*(x_chord[0] - x_mat2[0])^2 + 1/3*(x_chord[1] - x_mat2[3])^2 + 1/3*((x_chord[2] - x_mat2[4])^2))
ε2 = 2.45579e-9
ε3 := sqrt(1/3*(x_newt[0] - x_mat2[0])^2 + 1/3*(x_newt[1] - x_mat2[3])^2 + 1/3*((x_newt[2] - x_mat2[4])^2))
ε3 = 4.84235e-11
f2(x) := 2*x^5 - 2*x^4 - 4*x^3 + 2*x + 2
2*x^5 - 2*x^4 - 4*x^3 + 2*x + 1 solve → [
    -0.789036563465;
    -0.789036563465;
    -0.474518811819 - 0.407820547476i;
    -0.474518811819 + 0.407820547476i;
    1.87460368997
]
x_mat := f2(x) == 0 solve, assume, x == real → [1; -1; ((3*sqrt(33) + 19)^(2/3) + (3*sqrt(33) + 19)^(1/3) + 4)/(3*(3*sqrt(33) + 19)^(1/3))]
